mkZ(y, t0, tk, N, D) :=
    Z0 ← rkfixed(y, t0, tk, N, D)
    n ← rows(Z0) - 1
    for i ∈ 0 .. n
        cy[0] ← Z0[:, 1][i]
        cy_[i] ← D(Z0[:, 0][i], cy)
    return augment(Z0, cy_)
mkEx1(t0, tb, N) :=
    T ← 2
    a ← [T; 1]
    D(x, y) ← -a[1]/a[0]*y[0]
    IC[0] ← 0.5
    Z ← mkZ(IC, t0, tb, N, D)
    return Z
DZ1 := mkEx1(0, 10, 100)
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mkMatrA(va) :=
    n ← rows(va)
    for i ∈ 1 .. n - 1
        for j ∈ 0 .. i - 1
            r[i - 1, j] ← va[i - 1 - j]
    1
    return r
mkVecD_Type1(b, va) :=
    n ← rows(va) - 1
    r[n - 1] ← b
    return r
mkDiff_Type1(va) :=
    Diff1(x, y) ← -va[1]/va[0]*y[0]
    n ← rows(va)
    return Diff1 if n == 2
    Diff2(x, y) ← [
        y[1];
        {
            iMax ← n - 2
            -sum(y[i]*va[(iMax + 1) - i]/va[0], i = 0 .. iMax)
        }
    ]
    return Diff2 if n == 3
    Diff3(x, y) ← [
        y[1];
        y[2];
        {
            iMax ← n - 2
            -sum(y[i]*va[(iMax + 1) - i]/va[0], i = 0 .. iMax)
        }
    ]
    Diff3
mkMatrA(transpose([2, 4, 10])) = [2, 0; 4, 2]
mkVecD_Type1(1, transpose([2, 4, 10])) = [0; 1]
mk_ΔIC_Type1(va, b) :=
    A ← mkMatrA(va)
    d ← mkVecD_Type1(b, va)
    r ← lsolve(A, d)
    return r
mk_ΔIC_Type1(transpose([2, 4, 10]), 1) = [0; 0.5]
mk_ΔIC_Type1([2; 1], 1) = [0.5]
T_ex1 := 2
mkEx1_2(t0, tb, N) :=
    zeroIC ← 0
    va ← transpose([T_ex1, 1])
    b ← 1
    ΔIC ← mk_ΔIC_Type1(va, b)
    IC ← zeroIC + ΔIC
    Diff(x, y) ← -va[1]/va[0]*y[0]
    Z ← rkfixed(IC, t0, tb, N, Diff)
    return Z
DZ1 := mkEx1_2(0, 10, 100)
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Diff3(x, y) ←
    for i ∈ 0 .. n - 2
        r[i] ← y[i + 1]
    iMax ← n - 2
    r[n - 1] ← -sum(y[i]*va[(iMax + 1) - i]/va[0], i = 0 .. iMax)
    r
# analitycal solution
y_ex1(t) := 1/T_ex1*exp(-t/T_ex1)
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mkEx2(t0, tb, N) :=
    zeroIC ← transpose([0, 0])
    va ← transpose([2, 4, 10])
    b ← 1
    ΔIC ← mk_ΔIC_Type1(va, b)
    IC ← zeroIC + ΔIC
    Diff(x, y) ← [y[1]; -va[1]*y[1]/va[0] + (-va[2]*y[0]/va[0])]
    Z ← rkfixed(IC, t0, tb, N, Diff)
    return Z
1/4*exp(-t)*sin(2*t)
# analitycal solution
DZ2 := mkEx2(0, 10, 100)
AZ2 :=
    r[:, 0] ← DZ2[:, 0]
    r[:, 1] ← vectorize(1/4*exp(-r[:, 0])*sin(2*r[:, 0]))
    return r
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1/(2*s^2 + 4*s + 10) invlaplace → sin(2*t)*e^(-t)/4
[2, 0; 4, 2]^-1 = [0.5, 0; -1, 0.5]
mkIC_Type1(va, b, IC0) :=
    ΔIC ← mk_ΔIC_Type1(va, b)
    IC ← IC0 + ΔIC
    return IC
1/(s^3 + 2*s^2 + 2*s) invlaplace → 1/2 - e^(-t)*sin(t)/2 - e^(-t)*cos(t)/2
mkZrowByIC(t, IC) := transpose(stack(t, IC))
mkSlnT1_a(va, b, IC0, t0, tb, N) :=
    if tb ≤ t0
        1
        r ← mkZrowByIC(t0, IC0)
        return r
    IC ← mkIC_Type1(va, b, IC0)
    D ← mkDiff_Type1(va)
    Z ← rkfixed(IC, t0, tb, N, D)
    return Z
mkSlnT1_a(transpose([1, 2, 2]), 1, transpose([22, 33]), 0, 0, 10) = [0, 22, 33]
mkEx3(t0, tb, N) :=
    zeroIC ← transpose([0, 0])
    va ← transpose([1, 2, 2])
    b ← 1
    Z ← mkSlnT1_a(va, b, zeroIC, t0, tb, N)
    return Z
# analitycal solution
1/(1*s^2 + 2*s + 2) invlaplace → e^(-t)*sin(t)
DZ3 := mkEx3(0, 10, 100)
AZ3 :=
    r[:, 0] ← DZ2[:, 0]
    r[:, 1] ← vectorize(1/1*exp(-r[:, 0])*sin(r[:, 0]))
    return r
[1, 0; 2, 1]^-1 = [1, 0; -2, 1]
[1, 0; 2, 1]^-1*[0; 1] = [0; 1]
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extractIC(Z) :=
    n ← rows(Z)
    lastRow ← submatrix(Z, n - 1, n - 1, 1, cols(Z) - 1)
    lastRow
lastRow(Z) :=
    n ← rows(Z)
    lastRow ← submatrix(Z, n - 1, n - 1, 0, cols(Z) - 1)
    lastRow
mkSlnT1_b(va, b, c, IC0, t0, tb, N) :=
    if tb ≤ t0
        1
        r ← mkZrowByIC(t0, IC0)
        return r
    if t0 == tb
        1
        return mkZrowByIC(t0, IC0)
    Diff ← mkDiff_Type1(va)
    if c < t0 or c ≥ tb
        Z ← rkfixed(IC0, t0, tb, N, Diff)
        return Z
    if t0 == c
        Z ← mkSlnT1_a(va, b, IC0, t0, tb, N)
        return Z
    Z1 ← rkfixed(IC0, t0, c, N, Diff)
    Z2 ←
        IC1_ ← extractIC(Z1)
        ΔIC ← mk_ΔIC_Type1(va, b)
        IC1 ← transpose(IC1_) + ΔIC*1
        Z2 ← mkZrowByIC(c, IC1) if c == tb
        Z2 ← rkfixed(IC1, c, tb, N, Diff) otherwise
    Z ← stack(Z1, Z2)
    return Z
Hev(t) :=
    return 0 if t ≤ 0
    return 1 otherwise
mkEx4(t0, tb, N, c) :=
    zeroIC ← transpose([0, 0])
    va ← transpose([1, 2, 2])
    b ← 1
    Z ← mkSlnT1_b(va, b, c, zeroIC, t0, tb, N)
    Z
mkEx4(44, 43, 10, 0.5) = [44, 0, 0]
c_ex4 := 2
y_ex4(t) := Hev(t - c_ex4)*exp(-(t - c_ex4))*sin(t - c_ex4)
DZ4 := mkEx4(0, 10, 100, c_ex4)
AZ4 :=
    r[:, 0] ← DZ4[:, 0]
    for j ∈ 0 .. rows(r[:, 0]) - 1
        r[j, 1] ← y_ex4(r[j, 0])
    return r
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mkEx5(t0, tb, N, c) :=
    zeroIC ← transpose([0, 0])
    va ← transpose([1, 0, 1])
    b ← 4
    Z ← mkSlnT1_b(va, b, c, zeroIC, t0, tb, N)
    Z
c_ex5 := 2*π
DZ5 := mkEx5(0, 15, 100, c_ex5)
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reduce_vcb(vcb) :=
    n ← rows(vcb)
    j ← 0
    r[j, 0] ← vcb[j, 0]
    r[j, 1] ← vcb[j, 1]
    if n == 1
        1
        return r
    for i ∈ 1 .. n - 1
        r[j, 1] ← r[j, 1] + vcb[i, 1] if r[j, 0] == vcb[i, 0]
        otherwise
            j ← j + 1
            r[j, 0] ← vcb[i, 0]
            r[j, 1] ← vcb[i, 1]
    1
    return r
mkEx6(t0, tb, N, c) :=
    zeroIC ← transpose([1, 0])
    va ← transpose([1, 0, 1])
    b ← 4
    Z ← mkSlnT1_b(va, b, c, zeroIC, t0, tb, N)
    Z
DZ6 := mkEx6(0, 15, 100, c_ex5)
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mkReducedVcVb(vc, vb) :=
    tuple_vc_vb ← augment(vc, vb)
    sv ← csort(tuple_vc_vb, 0)
    redR ← reduce_vcb(sv)
    redVc ← redR[:, 0]
    redVb ← redR[:, 1]
    R[0] ← redVc, R[1] ← redVb
    R
mkReducedVcVb(0, 0) = [[0]; [0]]
stub1 := mkReducedVcVb([π; 2*π; π; 10], [1; 1; 2; 0])
augment(0, 0) = [0, 0]
stub1[0] = [3.14159; 6.28319; 10]
stub1[1] = [3; 1; 0]
mapZ(vZ) :=
    n ← rows(vZ)
    R ← vZ[0]
    if n > 1
        1
        for i ∈ 1 .. n - 1
            R ← stack(R, vZ[i])
            R
    R
mkSlnT1_c(va, vb, vc, IC0, t0, tb, N) :=
    if tb ≤ t0
        r ← mkZrowByIC(t0, IC0)
        return r
    rVcVb ← mkReducedVcVb(vc, vb)
    redVc ← rVcVb[0], redVb ← rVcVb[1]
    IC[0] ← IC0
    Z[0] ← mkSlnT1_b(va, redVb[0], redVc[0], IC[0], t0, redVc[0], N)
    iLast ← rows(redVb) - 2
    if iLast ≥ 0
        for i ∈ 0 .. iLast
            Z[i + 1] ←
                IC_[i] ← extractIC(Z[i])
                ΔIC[i] ← mk_ΔIC_Type1(va, redVb[i])
                IC[i + 1] ← transpose(IC_[i]) + ΔIC[i]*0
                r ← mkSlnT1_b(va, redVb[i], redVc[i], IC[i + 1], redVc[i], redVc[i + 1], N)
        1
    n ← rows(Z)
    Z[n] ←
        IC_[n - 1] ← extractIC(Z[n - 1])
        ΔIC[n] ← mk_ΔIC_Type1(va, redVb[n - 1])
        IC[n] ← transpose(IC_[n - 1]) if n == 1
        IC[n] ← transpose(IC_[n - 1]) + ΔIC[n]*0 otherwise
        r ← mkSlnT1_b(va, redVb[n - 1], redVc[n - 1], IC[n], redVc[n - 1], tb, N)
    R ← mapZ(Z)
    R
stub_ := mkSlnT1_a([2; 1], 1, 0, 0, 10, 100)
stub := mkSlnT1_b([2; 1], 1, 0, 0, 0, 10, 100)
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stubC := mkSlnT1_c([2; 1], 1, 0, 0, 0, 10, 100)
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M := mkSlnT1_c([1; 0; 1], [2; 1; 3], [2*π; π; 2*π], [1; 0], 0, 10, 100)
zeroIC ← transpose([1, 0])
va ← transpose([1, 0, 1])
M1 := mkSlnT1_c([1; 0; 1], 0, 0, [0; 0], 0, 10, 100)
S := M
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M = [
    0, 1, 0;
    0.0314159, 0.999507, -0.0314108;
    0.0628319, 0.998027, -0.0627905;
    0.0942478, 0.995562, -0.0941083;
    0.125664, 0.992115, -0.125333;
    0.15708, 0.987688, -0.156434;
    0.188496, 0.982287, -0.187381;
    0.219911, 0.975917, -0.218143;
    0.251327, 0.968583, -0.24869;
    0.282743, 0.960294, -0.278991
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]
# Recheck all examples with mkSlnT1_c
ex1 := mkSlnT1_c([2; 1], 1, 0, 0, 0, 10, 100)
ex1_a(t) := 1/2*e^(-t/2)
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ex2 := mkSlnT1_c([2; 4; 10], 1, 0, [0; 0], 0, 10, 100)
ex2_a(t) := 1/4*e^(-t)*sin(2*t)
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ex3_a(t) := e^(-t)*sin(t)
ex3 := mkSlnT1_c([1; 2; 2], 1, 0, [0; 0], 0, 10, 100)
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stub := mkSlnT1_b([1; 2; 2], 1, 2, [0; 0], 0, 10, 100)
ex4 := mkSlnT1_c([1; 2; 2], 1, 2, [0; 0], 0, 10, 100)
ex4_a(t) := Hev(t - 2)*e^(-(t - 2))*sin(t - 2)
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ex5_a(t) := Hev(t - 2*π)*4*sin(t)
ex5 := mkSlnT1_c([1; 0; 1], 4, 2*π, [0; 0], 0, 15, 100)
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ex6_a(t) := cos(t) + Hev(t - 2*π)*4*sin(t)
ex6 := mkSlnT1_c([1; 0; 1], 4, 2*π, [1; 0], 0, 15, 100)
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ex7 := mkSlnT1_c([1; 0; 4], [1; -1; 0], [π; 2*π; 10], [0; 0], 0, 15, 100)
ex7_a(t) := 1/2*(Hev(t - 1*π) - Hev(t - 2*π))*sin(2*t)
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ex7 = [
    0, 0, 0;
    0.0314159, 0, 0;
    0.0628319, 0, 0;
    0.0942478, 0, 0;
    0.125664, 0, 0;
    0.15708, 0, 0;
    0.188496, 0, 0;
    0.219911, 0, 0;
    0.251327, 0, 0;
    0.282743, 0, 0
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]
ex8 := mkSlnT1_c([1; 2; 2; 0], 1, 0, [0; 0; 0], 0, 10, 100)
ex8_a(t) := 1/2 - 1/2*e^(-t)*(sin(t) + cos(t))
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mkMatrA([1; 2; 2; 0]) = [1, 0, 0; 2, 1, 0; 2, 2, 1]
mkVecD_Type1(1, [1; 2; 2; 0]) = [0; 0; 1]
mk_ΔIC_Type1([1; 2; 2; 0], 1) = [0; 0; 1]
mkMatrA([1; 2; 2; 0])^-1 = [1, 0, 0; -2, 1, 0; 2, -2, 1]
mkMatrA([1; 2; 2; 0])^-1*mkVecD_Type1(1, [1; 2; 2; 0]) = [0; 0; 1]
